*Heading
** Job name: Job-1 Model name: Model-1
** Generated by: Abaqus/CAE 2018
*Preprint, echo=NO, model=NO, history=NO, contact=NO
**
** PARTS
**
*Part, name=liver_m_simp
*Node
      1,    0.1324628,  0.180000007,  0.358956665
      2,  0.103391513,  0.180000007,  0.380284101
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*Element, type=C3D4T
  1, 388, 395, 415, 416
  2, 416, 417, 418, 415
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*Nset, nset=_PickedSet28, internal, generate
   1,  935,    1
*Elset, elset=_PickedSet28, internal, generate
    1,  4408,     1
*Elset, elset=BodyHFlux, generate
   1,  187,    1
*Nset, nset=Disp
  72,  83,  87,  88,  94,  95
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*Nset, nset=FixT&P
  23,  24,  25,  36,  43,  44
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*Elset, elset=Grav, generate
    1,  4408,     1
*Elset, elset=Metabo, generate
    1,  4408,     1
*Nset, nset=T0, generate
   1,  935,    1
** Section: Section-1
*Solid Section, elset=_PickedSet28, material=Material-1
,
*End Part
**
**
** ASSEMBLY
**
*Assembly, name=Assembly
**
*Instance, name=liver_m_simp-1, part=liver_m_simp
*End Instance
**
*End Assembly
*Amplitude, name=Amp-1, time=TOTAL TIME
             0.,              0.,              5.,              1.
**
** MATERIALS
**
*Material, name=Material-1
*Conductivity
 0.518,
*Density
1060.,
*Hyperelastic, neo hooke
 3283.5, 6.131e-06
*Specific Heat
3700.,
**
** PREDEFINED FIELDS
**
** Name: T0   Type: Temperature
*Initial Conditions, type=TEMPERATURE
liver_m_simp-1.T0, 36.7
** ----------------------------------------------------------------
**
** STEP: Step-1
**
*Step, name=Step-1, nlgeom=YES
*Dynamic Temperature-displacement, Explicit, direct user control
0.00013, 5.
*Bulk Viscosity
0.06, 1.2
**
** BOUNDARY CONDITIONS
**
** Name: Disp Type: Displacement/Rotation
*Boundary, amplitude=Amp-1
liver_m_simp-1.Disp, 1, 1, -0.02
liver_m_simp-1.Disp, 2, 2
liver_m_simp-1.Disp, 3, 3, 0.03
liver_m_simp-1.Disp, 4, 4
liver_m_simp-1.Disp, 5, 5
liver_m_simp-1.Disp, 6, 6
** Name: FixP Type: Displacement/Rotation
*Boundary
liver_m_simp-1.FixT&P, 1, 1
liver_m_simp-1.FixT&P, 2, 2
liver_m_simp-1.FixT&P, 3, 3
liver_m_simp-1.FixT&P, 4, 4
liver_m_simp-1.FixT&P, 5, 5
liver_m_simp-1.FixT&P, 6, 6
** Name: FixT Type: Temperature
*Boundary
liver_m_simp-1.FixT&P, 11, 11, 36.7
**
** LOADS
**
** Name: BodyHFlux   Type: Body heat flux
*Dflux
liver_m_simp-1.BodyHFlux, BF, 8e+06
** Name: Grav   Type: Body force
*Dload
liver_m_simp-1.Grav, BZ, -9.81
** Name: Metabo   Type: Body heat flux
*Dflux
liver_m_simp-1.Metabo, BF, 33800.
**
** OUTPUT REQUESTS
**
*Restart, write, number interval=1, time marks=NO
**
** FIELD OUTPUT: F-Output-1
**
*Output, field, variable=PRESELECT
**
** HISTORY OUTPUT: H-Output-1
**
*Output, history, variable=PRESELECT
*End Step
